u := 1
T := 0.2
τ := 0.1
s(t) := u/3*Φ(t + τ/2) + 8*u/(3*τ)*(t + τ/2)*(Φ(t + τ/2) - Φ(t + τ/4)) - 8*u/(3*τ)*t*(Φ(t + τ/4) - Φ(t)) + 8*u/(3*τ)*t*(Φ(t) - Φ(t - τ/4)) - 8*u/(3*τ)*(t - τ/2)*(Φ(t - τ/4) - Φ(t - τ/2)) - u/3*Φ(t - τ/2)
export(bgn, end, cnt, f) :=
    stp ← (end - bgn)/(cnt - 1)
    Z ← ["x"]
    for i ∈ 1 .. cnt
        Z[i, 0] ← bgn + stp*(i - 1)
        Z[i, 1] ←
            try
                f(Z[i, 0])
            on error
                if i ≠ 1
                    Z[i - 1, 1]
                else
                    0
    Z
a := WRITEEXCEL("lab1_signal.xlsx", export(-τ, τ, 1000, s))
S(ω) := integral(s(t)*e^(-1i*ω*t), t = -τ/2 .. τ/2) simplify, rewrite, sin → (0.666666666667*ω*sin(0.05*ω) + (106.666666667*sin(0.025*ω)^2 - 213.333333333*sin(0.0125*ω)^2))/ω^2
dB(x) :=
    if x < 10^20
        if x > 10^-20
            10*log(x)
        else
            -200
    else
        200
S(ω) := 0.033*sinc(0.05*ω) + 106.66*0.025^2*sinc(0.025*ω)^2 - 213.33*0.0125^2*sinc(0.0125*ω)^2
# [plot: |S(ω)| vs ω]
F(ω) := d/dω(|S(ω)|)
maxW := root(F(ω), ω, -1, 1)
maxW = 0
maxS := |S(maxW)|
maxS = 0.0663297
S_db(ω) := dB(S(ω)*conj(S(ω))/(maxS*conj(maxS)))
ω_в := 6*π/τ → 188.495559215
b := WRITEEXCEL("lab1_spectrum.xlsx", export(-315, 315, 1000, S_db))
# [plot: S_db(ω) vs ω]
C(n, ω_1) := ω_1/(2*π)*S(n*ω_1) simplify → (0.105042262441*ω_1*n*sin(0.05*ω_1*n) + (16.9762620049*cos(0.025*ω_1*n) - 8.48852888981 - 8.48773311509*cos(0.05*ω_1*n)))/(ω_1*n^2)
C(n, ω_0) := ω_0/(2*π)*S(n*ω_0) → 0.159154943092*ω_0*(0.66*sin(0.05*ω_0*n)/(ω_0*n) + (106.66*sin(0.025*ω_0*n)^2/(ω_0^2*n^2) - 1.0*213.33*sin(0.0125*ω_0*n)^2/(ω_0^2*n^2)))
ω_1 := 2*π/T → 31.4159265359
ω_2 := 2*π/(10*T) → 3.14159265359
C_max(ω_1) := ω_1/(2*π)*maxS
C_db(n, ω_1) := dB(C(n, ω_1)*conj(C(n, ω_1))/(C_max(ω_1)*conj(C_max(ω_1))))
C_dB(n, ω_2) := dB(C(n, ω_2)*conj(C(n, ω_2))/(C_max(ω_2)*conj(C_max(ω_2))))
# [plot: C_dB(n, ω_1) vs n]
# [plot: S_db(ω), C_dB(n, ω_1), C_dB(n, ω_2) vs ω, n*ω_1, n*ω_2]
nGrph(w1) :=
    bgn ← floor(-ω_в/w1)
    end ← ceil(ω_в/w1)
    Z[0, 0] ← "n"
    Z[0, 1] ← "ω"
    Z[0, 2] ← "Cn"
    for i ∈ 0 .. end - bgn
        Z[i + 1, 0] ← bgn + i
        Z[i + 1, 1] ← w1*(bgn + i)
        Z[i + 1, 2] ←
            try
                C_db(bgn + i, w1)
            on error
                if i ≠ 0
                    Z[i, 2]
                else
                    0
    Z
m := 10
i := WRITEEXCEL("Cn_w10.xlsx", nGrph(2*π/(10*T)))
u := 1
T := 0.2
τ := 0.1
s(t) := u/3*Φ(t + τ/2) + 8*u/(3*τ)*(t + τ/2)*(Φ(t + τ/2) - Φ(t + τ/4)) - 8*u/(3*τ)*t*(Φ(t + τ/4) - Φ(t)) + 8*u/(3*τ)*t*(Φ(t) - Φ(t - τ/4)) - 8*u/(3*τ)*(t - τ/2)*(Φ(t - τ/4) - Φ(t - τ/2)) - u/3*Φ(t - τ/2)
s_a(t) := sum(C(k, ω_1)*e^(1i*k*t*ω_1), k = -10 .. -1) + sum(C(k, ω_1)*e^(1i*k*t*ω_1), k = 1 .. 10) + (1/T*integral(s(t), t = -T/2 .. T/2))
s_a(t) := Re(s_a(t))
g := WRITEEXCEL("signal.xlsx", export(-τ, τ, 1000, s))
f := WRITEEXCEL("spectrum_db.xlsx", export(-ω_в, ω_в, 1000, S_db))
p := WRITEEXCEL("signal_approx.xlsx", export(-τ, τ, 1000, s_a))
s_0 := sqrt(integral((s(t) - s_a(t))^2, t = -T/2 .. T/2))/sqrt(integral(s(t)^2, t = -τ/2 .. τ/2)) = 0.0397948
l := WRITEEXCEL("Cn_w1.xlsx", nGrph(2*π/T))
# [plot: Re(s_a(t)), s(t) vs t]
